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/batch
! ANSYS input file written by Workbench version 2020 R1
! File used for geometry attach: D:\Documentos\Universidad\doble_titulo_francia\EPSA\yoo\bbb_files\dp0\SYS\DM\SYS.agdb
/title,bbb--Steady-State Thermal (A5)
/com,--- Data in consistent MKS units. See Solving Units in the help system for more information.
/units,MKS
/prep7
! Turn off shape checking because checks already performed inside WB mesher.
! See help system for more information.
SHPP,OFF,,NOWARN
etcon,set             ! allow ANSYS to choose best KEYOP's for 180x elements
/com,*********** Nodes for the whole assembly ***********
nblock,3,,22576
(1i9,3e20.9e3)
        1    -9.111846342E-02    -9.507131467E-02     2.666666667E-03
        2    -9.111846342E-02    -9.507131468E-02     5.333333333E-03
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-1
/com,*********** Nodes for all Remote Points ***********
nblock,3
(1i9,3e20.9e3)
    20525     9.049374296E-19    -1.340949857E-01     4.000000190E-03
-1
/com,*********** Elements for Body 1 "PartBody" ***********
et,1,90
eblock,19,solid,,1554
(19i9)
        1        1        1        1        0        0        0        0       20        0        1        1     1939     1958     2182     1314     1951     1957     2328
     2405     7905     7938     2406     6578     7929     7936     6579     2404     7904     7935     8309
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-1
/com,*********** Elements for Body 2 "PartBody" ***********
et,2,90
eblock,19,solid,,2094
(19i9)
        2        2        2        2        0        0        0        0       20        0     1555     8669     8671     8691     8687    10366    10365    10355    10357
    11966    11978    12043    11968    17433    17419    17418    17424    11970    11979    12059    12045
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-1
/com,*********** Send User Defined Coordinate System(s) ***********
local,12,0,-3.93962375819683e-002,-3.93962375819683e-002,4.00000018998981e-003,45.,0.,180.
csys,0
toffst,273.15,  ! Temperature offset from absolute zero
/com,*********** Send Materials ***********
Temperature = 'TEMP' ! Temperature
MP,DENS,1,7750,	! kg m^-3
MP,ALPX,1,1.7e-05,	! C^-1
MP,C,1,480,	! J kg^-1 C^-1
MP,KXX,1,15.1,	! W m^-1 C^-1
MP,RSVX,1,7.7e-07,	! kg m^3 A^-2 s^-3
MP,EX,1,193000000000,	! Pa
MP,NUXY,1,0.31,
MP,MURX,1,1,

Temperature = 'TEMP' ! Temperature
MP,DENS,2,7750,	! kg m^-3
MP,ALPX,2,1.7e-05,	! C^-1
MP,C,2,480,	! J kg^-1 C^-1
MP,KXX,2,15.1,	! W m^-1 C^-1
MP,RSVX,2,7.7e-07,	! kg m^3 A^-2 s^-3
MP,EX,2,193000000000,	! Pa
MP,NUXY,2,0.31,
MP,MURX,2,1,

!************************* Model Summary ********************
!PartBody,	Stainless Steel,	matid,	1
!PartBody,	Stainless Steel,	matid,	2
!************************* End Model Summary ********************
/com,*********** Create Contact "Contact Region" ***********
*set,tid,4
*set,cid,3
r,tid
r,cid
et,tid,170
et,cid,174
eblock,10,,,222
(15i9)
     7342        4        4        4        0     1958     2182     2328     1957     7938     8309     7936     7935
     7343        4        4        4        0     1959     2255     2182     1958     7939     8308     7938     7937
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-1
eblock,10,,,222
(15i9)
     7564        3        3        3        0     1958     2182     2328     1957     7938     8309     7936     7935
     7565        3        3        3        0     1959     2255     2182     1958     7939     8308     7938     7937
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-1
eblock,10,,,207
(15i9)
     7786        3        4        3        0    11220    11761    11000    11184    19269    18827    18826    19202
     7787        3        4        3        0    11219    11829    11761    11220    19268    20189    19269    19267
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-1
eblock,10,,,207
(15i9)
     7993        4        3        4        0    11220    11761    11000    11184    19269    18827    18826    19202
     7994        4        3        4        0    11219    11829    11761    11220    19268    20189    19269    19267
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-1
keyo,cid,8,2               ! auto create asymmetric contact (from Program Controlled setting)
keyo,cid,10,0              ! adjust contact stiffness each NR iteration (from Program Controlled setting)
keyo,cid,12,5              ! bonded always
keyo,cid,18,1              ! small sliding turned on by application
keyo,cid,2,0               ! augmented Lagrange (from Program Controlled setting)
keyo,cid,4,0               ! on Gauss point (from Program Controlled setting)
keyo,cid,9,1               ! ignore initial gaps/penetration
keyo,cid,7,0               ! No Prediction
rmod,tid,3,10.      ! FKN
rmod,tid,5,0.       ! ICONT
rmod,tid,6,0.       ! PINB
rmod,tid,10,0.      ! CNOF
rmod,tid,12,0.      ! FKT
rmod,tid,36,27      ! WB DSID
rmod,cid,3,10.      ! FKN
rmod,cid,5,0.       ! ICONT
rmod,cid,6,0.       ! PINB
rmod,cid,10,0.      ! CNOF
rmod,cid,12,0.      ! FKT
rmod,cid,36,27      ! WB DSID
*set,_maxkxx,151000.
rmod,cid,14,_maxkxx/_ASMDIAG         ! TCC, Divide by Length since Traction Based
rmod,tid,14,_maxkxx/_ASMDIAG      ! TCC, Divide by Length since Traction Based
keyo,cid,1,2     ! Pure thermal contact
nsel,all
esel,all
/com,*********** Create "Heat Flux" ***********
et,5,152
eblock,10,,,1036
(15i9)
     8200        5        5        5        0     1900     1315     1825     1899     6583     6582     7680     7829
     8201        5        5        5        0     1901     1388     1315     1900     6802     6581     6583     7831
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-1
esel,s,type,,5
keyop,5,8,1      ! include heat flux
esel,all
fcum,add                   ! add nodal forces up (needed in case have loads on the same edge,vertex)
fcum                       ! reset default on fcum command since done sending WB F loads
/com,*********** Create "Convection" ***********
et,6,152
eblock,10,,,3089
(15i9)
     9236        6        6        6        0     2328     1314     1951     1957     6579     6578     7929     7936
     9237        6        6        6        0     1314     1241     1952     1951     6431     6432     7928     6578
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-1
esel,s,type,,6
keyop,6,8,2.
keyop,6,13,0
esel,all
/com,*********** Create "ToAmbient" Radiation ***********
n,20526,_ASMDIAG*0.5*1,0.,0.
nsel,s,node,,20526
cm,_SPND52,node
nsel,all
et,7,152
keyop,7,5,1         !  Extra node
keyop,7,9,1         !  Use radiation with the form factor real constant
eblock,10,,,3110
(15i9)
    12325        7        7        7        0     1900     1315     1825     1899     6583     6582     7680     7829    20526
    12326        7        7        7        0     1901     1388     1315     1900     6802     6581     6583     7831    20526
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-1
esel,s,type,,7
mp,emis,7,0.85
r,7,1.,5.669e-008
stef,5.669e-008
esel,all
nsel,all
/com,***************** Define Uniform Initial temperature ***************
tunif,40.
fini
/com,****************************************************************************
/com,*************************    SOLUTION       ********************************
/com,****************************************************************************
/solu
antype,0                   ! static analysis
!eqsl,sparse               ! using sparse solver which is default so no eqsl command needed
cntr,print,1               ! print out contact info and also make no initial contact an error
rescontrol,,none                 ! Do not keep any restart files
dmpoption,emat,no             ! Don't combine emat file for DANSYS
dmpoption,esav,no             ! Don't combine esav file for DANSYS
/com,****************************************************
/com,******************* SOLVE FOR LS 1 OF 1 ****************
esel,s,type,,5
nsle
sf,all,hflux,44510.
nsel,all
esel,all
esel,s,type,,6
nsle
sf,all,conv,133.7,20.
nsel,all
esel,all
d,_SPND52,temp,20.
autots,on
nsub,1,10,1
time,1.
outres,erase
outres,all,none
outres,nsol,all
outres,rsol,all
outres,eangl,all
outres,veng,all
outres,fflux,all
outres,cont,all
esel,s,type,,6
esel,a,type,,7
cm,_elmisc,elem
esel,all
outres,misc,all,_elmisc
cnvtol,heat,,.001,,1.e-006    ! Program Controlled. Set MINREF equivalent of 1e-6 Watts
! *********** WB SOLVE COMMAND ***********
! check interactive state
*get,ANSINTER_,active,,int
*if,ANSINTER_,ne,0,then
/eof
*endif
solve
/com *************** Write FE CONNECTORS *********
CEWRITE,file,ce,,INTE
/com,****************************************************
/com,*************** FINISHED SOLVE FOR LS 1 *************
/post1
fini
